# OpenSim document version 40000
Model GuineaFowl2019-scaled760-40C:
  gravity: 0 -9.80665 0
  length_units: m
  force_units: N
  credits:
    Suzanne Cox Katrina Easton Melanie Cromie Lear Richard L. Marsh Scott L. Delp Jonas Rubenson
  publications:
    Cox, SM, Easton, KL, Cromie Lear, M, Marsh, RL, Delp, SL, Rubenson, J, The interaction of compliance and activation on the force-length operating range and force generating capacity of skeletal muscle: a computational study using a guinea fowl musculoskeletal model. Integrative Organismal Biology 2019 In press
  Ground
  BodySet:
    Body pelvis: mass=1.401339 [kg] mass_center=(0.03738 0.021283 0) inertia=(0.007441165 0 0.007441165 0 0 0)
        meshes=pelvis.vtp
      WrapCylinder ILPR_1: xyz_body_rotation=(2.62358 1.54462 -2.73929) translation=(0.0503 -0.0174 0.0166) quadrant=-x
          radius=0.0025 length=0.0395
      WrapCylinder ILPR: xyz_body_rotation=(1.60745 -0.0832522 1.68529) translation=(0.0355 -0.0181 0.0216) quadrant=-y
          radius=0.0025 length=0.0125
      WrapCylinder Pelvis_bot: xyz_body_rotation=(-0.211359 -1.41145 -0.385892) translation=(0.0507 -0.0146 0.0153)
          quadrant=-y radius=0.0025 length=0.0071
      WrapCylinder Ischium: xyz_body_rotation=(1.51006 -1.03009 1.20829) translation=(0.0165 -0.0244 0.0226) quadrant=y
          radius=0.0011 length=0.007
      WrapCylinder Ili_bot_2: xyz_body_rotation=(0.326551 -1.24808 0.229162) translation=(0.0433 -0.0133 0.0154)
          quadrant=x radius=0.0015 length=0.007
      WrapCylinder Isch_2: xyz_body_rotation=(1.38928 -1.09764 1.4872) translation=(0.0026 -0.0322 0.0257) quadrant=x
          radius=0.0025 length=0.02
      WrapSphere ILPR_2: xyz_body_rotation=(-2.56005 -0.81088 1.73137) translation=(0.0725 -0.0229 0.0152) quadrant=all
          radius=0.008
      WrapCylinder ITC_super: xyz_body_rotation=(-2.59967 -1.12591 -1.43012) translation=(0.0634 -0.0186 0.0156)
          quadrant=x radius=0.003 length=0.01
    Body femur: mass=0.1474167 mass_center=(-0.0036517 -0.03507116 0) inertia=(0.0001927417 0 0.0001927417 0 0 0)
        meshes=femur.vtp
      WrapSphere Fem_head: xyz_body_rotation=(0.010472 0.0226893 -0.0752237) translation=(0.007738 -0.000954 0.007844)
          quadrant=all radius=0.01113
      WrapCylinder Fem_neck: xyz_body_rotation=(-2.2986 0.110305 1.90485) translation=(0.012614 0.001696 0.00954)
          quadrant=-x radius=0.00212 length=0.017172
      WrapSphere pat_1: xyz_body_rotation=(0.0115192 -0.253422 -0.00383972) translation=(-0.002862 -0.070066 0.02809)
          quadrant=all radius=0.011872
      WrapCylinder tib_1: xyz_body_rotation=(-1.47271 0.0516617 -0.326028) translation=(-0.004134 -0.082362 0.03021)
          quadrant=all radius=0.00848 length=0.0265
      WrapSphere fem_bot: xyz_body_rotation=(-0.134216 -0.949285 -0.442965) translation=(-0.004452 -0.066886 0.029256)
          quadrant=all radius=0.01431
      WrapSphere Femur_shank_2: active=false xyz_body_rotation=(-1.86785 0.0853466 0.305956)
          translation=(-0.00212 -0.069218 0.027878) quadrant=all radius=0.0106
      WrapSphere ILPR_3: translation=(-0.000954 -0.071444 0.02544) quadrant=x radius=0.00954
      WrapCylinder ILPO_1: xyz_body_rotation=(1.36747 -0.182911 -0.26529) translation=(0.006572 -0.053424 0.023638)
          quadrant=all radius=0.0053 length=0.0318
      WrapSphere IC_cr: xyz_body_rotation=(-0.210138 -0.0853466 -0.981748) translation=(-0.001696 -0.071126 0.026712)
          quadrant=all radius=0.0106
      WrapSphere FTLP_l: xyz_body_rotation=(-0.210138 -0.0853466 -0.54175) translation=(-0.011024 -0.06307 0.024698)
          quadrant=all radius=0.0212
      WrapCylinder IF_a_1: xyz_body_rotation=(-1.49889 -1.11963 0.379609) translation=(0.00795 0.007208 0.011872)
          quadrant=x radius=0.00212 length=0.025228
      WrapSphere ISF: xyz_body_rotation=(-0.210138 -0.0853466 -0.54175) translation=(0.00212 0.000212 0.009858)
          quadrant=all radius=0.0053
      WrapCylinder FTM: xyz_body_rotation=(-0.0560251 0.597601 -1.06186) translation=(0.001484 -0.07208 0.024698)
          quadrant=x radius=0.00742 length=0.0159
      WrapCylinder IFE: xyz_body_rotation=(-0.728675 -0.910538 0.0274017) translation=(0.008268 0.001378 0.009646)
          quadrant=x radius=0.00636 length=0.02968
      WrapCylinder OM: xyz_body_rotation=(0.918741 0.111003 -1.00339) translation=(0.004452 -0.000318 0.00795)
          quadrant=-x radius=0.00848 length=0.0212
      WrapTorus IF: xyz_body_rotation=(1.51582 -0.339117 -1.15488) translation=(-0.011448 -0.060526 0.02862)
          quadrant=all inner_radius=0.004452 outer_radius=0.006042
      WrapCylinder DFiii_s: xyz_body_rotation=(0.862891 -1.15506 -0.0741765) translation=(-0.000212 -0.07791 0.035722)
          quadrant=x radius=0.00106 length=0.0106
      WrapCylinder FTI_m: xyz_body_rotation=(2.69461 0.739321 2.86025) translation=(0.007632 -0.058512 0.02809)
          quadrant=-x radius=0.00212 length=0.0106
      WrapSphere ILPO: xyz_body_rotation=(-0.210138 -0.0853466 -0.54175) translation=(-0.00318 -0.069324 0.028938)
          quadrant=all radius=0.01166
      WrapCylinder ILPO_cd: xyz_body_rotation=(-0.303513 -0.122348 -0.214326) translation=(0.006148 -0.071338 0.030846)
          quadrant=x radius=0.00212 length=0.00318
      WrapCylinder ILPR_a: xyz_body_rotation=(-0.210138 -0.0853466 -0.548033) translation=(0.008798 -0.05353 0.023532)
          quadrant=x radius=0.00212 length=0.005406
      WrapSphere FTI_l: xyz_body_rotation=(-0.210138 -0.0853466 -0.548033) translation=(-0.004346 -0.070384 0.027666)
          quadrant=x radius=0.01166
      WrapCylinder IC_cd: xyz_body_rotation=(-0.210138 -0.0853466 -0.548033) translation=(0.005088 -0.073352 0.023214)
          quadrant=x radius=0.00212 length=0.0106
      WrapCylinder AMB: xyz_body_rotation=(-0.14207 0.18134 -0.344179) translation=(0.00159 -0.071762 0.022048)
          quadrant=x radius=0.005936 length=0.0212
      WrapCylinder TC_f: xyz_body_rotation=(-0.429875 0.105592 -0.794823) translation=(-0.003604 -0.078228 0.034662)
          quadrant=x radius=0.00212 length=0.0053
      WrapCylinder DF_iv: xyz_body_rotation=(0.125838 -0.167377 -0.0897099) translation=(-0.00371 -0.073352 0.03286)
          quadrant=-x radius=0.00212 length=0.00212
    Body tibia: mass=0.1092645 mass_center=(0.0001691775 -0.03868526 0) inertia=(0.0001201369 0 0.0001201369 0 0 0)
        meshes=tibia.vtp
      WrapCylinder Ankle: xyz_body_rotation=(0.106814 0.0598648 1.12748) translation=(-0.002781 -0.11845 0.001957)
          quadrant=-x radius=0.005665 length=0.0206
      WrapCylinder Knee_ant: xyz_body_rotation=(0 0 1.24651) translation=(-0.003605 -0.007416 0.00515) quadrant=all
          radius=0.00103 length=0.00206
      WrapSphere DFii_s: xyz_body_rotation=(1.68564 1.28386 2.04204) translation=(-0.00515 -0.005459 0.009476)
          quadrant=all radius=0.003605
      WrapCylinder EDL: active=false xyz_body_rotation=(0.0671952 0.0891863 0.744383)
          translation=(-0.002987 -0.119274 0.004635) quadrant=-x radius=0.003502 length=0.0206
      WrapCylinder ANKLE_1: xyz_body_rotation=(0.00610865 0.0427606 1.04912) translation=(-0.003296 -0.117832 0.002884)
          quadrant=-x radius=0.00515 length=0.0103
      WrapCylinder ANKLE_2: xyz_body_rotation=(-0.128107 -0.0226893 0.962724) translation=(-0.00103 -0.119892 0.003399)
          quadrant=-x radius=0.00515 length=0.00927
      WrapCylinder ANKLE_3: xyz_body_rotation=(2.96374 -0.0879646 -0.7) translation=(-0.004326 -0.11948 0.003296)
          quadrant=-x radius=0.00515 length=0.01545
      WrapCylinder FL_l: xyz_body_rotation=(-0.0350811 0.0549779 1.24512) translation=(0.001339 -0.122467 0.007622)
          quadrant=-x radius=0.00103 length=0.00206
      WrapCylinder FCM: xyz_body_rotation=(-2.87526 1.08315 2.60822) translation=(-0.005356 -0.004841 -0.005871)
          quadrant=x radius=0.002575 length=0.0206
      WrapCylinder FTM_p: xyz_body_rotation=(-0.323933 0.330914 0.975988) translation=(0.006901 0.000309 -0.000824)
          quadrant=all radius=0.00103 length=0.00309
      WrapCylinder DF_ii_deep_post: xyz_body_rotation=(-0.00837758 0.347495 -0.095295)
          translation=(-0.004532 -0.005768 0.005562) quadrant=-x radius=0.00206 length=0.00206
      WrapCylinder ANKLE_4: xyz_body_rotation=(1.45 0.14 0.843518) translation=(-0.0125 -0.1334 0.002987) quadrant=-x
          radius=0.0017 length=0.02
      WrapCylinder Ankle_5: xyz_body_rotation=(0.0144862 0.0322886 1.1397) translation=(-0.003708 -0.118759 0.002163)
          quadrant=-x radius=0.005665 length=0.0103
      WrapCylinder Ankle_6: xyz_body_rotation=(0.0329867 0.0230383 0.862018) translation=(-0.003193 -0.119995 0.002781)
          quadrant=-x radius=0.005665 length=0.0206
      WrapCylinder Ankle7: xyz_body_rotation=(2.96305 0.0015708 -0.685042) translation=(-0.000309 -0.11433 0.003296)
          quadrant=x radius=0.004635 length=0.007725
    Body tmet: mass=0.01821074 mass_center=(-0.00210102 -0.03326615 0) inertia=(1.2294e-5 0 1.2294e-5 0 0 0)
        meshes=tmet.vtp
      WrapCylinder TC_Ankle: xyz_body_rotation=(-0.0612611 0.16441 -0.162839) translation=(0.003298 -0.003201 0.001649)
          quadrant=x radius=0.00291 length=0.00485
      WrapCylinder TC_tib: xyz_body_rotation=(-0.06353 -0.0293215 -0.375769) translation=(0.005044 -0.005335 0.00097)
          quadrant=x radius=0.00097 length=0.0097
      WrapCylinder Deep_DFiii: active=false xyz_body_rotation=(0.0944223 0.00698132 -0.209614)
          translation=(-0.004947 -0.002522 0.001067) quadrant=-x radius=0.00097 length=0.0097
      WrapCylinder FHL_h: xyz_body_rotation=(0.59219 0.654149 -1.32802) translation=(-0.005141 -0.006208 0.002425)
          quadrant=all radius=0.00097 length=0.0097
      WrapCylinder EDL_II: xyz_body_rotation=(0.273842 0.580846 -0.806517) translation=(-0.001746 -0.064214 0.001649)
          quadrant=x radius=0.005335 length=0.00873
      WrapSphere FDL_ii: active=false xyz_body_rotation=(-1.40028 0.18867 1.51233)
          translation=(-0.00582 -0.061692 0.001455) quadrant=x radius=0.00485
      WrapCylinder Wrap_1: xyz_body_rotation=(1.74428 1.13726 -2.07432) translation=(-0.003686 -0.00582 0.004462)
          quadrant=-x radius=0.00194 length=0.00776
    Body Phal1_II: mass=0 mass_center=(0 0 0) inertia=(0 0 0 0 0 0) meshes=Phal1_II.vtp
      WrapCylinder EDL_II_1: xyz_body_rotation=(-0.0153589 -0.0453786 0.86324)
          translation=(0.018928 0.001547 -0.000182) quadrant=all radius=0.00182 length=0.00182
      WrapCylinder TMP_2: xyz_body_rotation=(0.0774926 -0.0860447 0.316428) translation=(0.002912 0.002639 0.003731)
          quadrant=-x radius=0.006825 length=0.00455
    Body Phal1_III: mass=0.01132619 mass_center=(0.01463844 -0.0304274 0) inertia=(1.629537e-6 0 1.629537e-6 0 0 0)
        meshes=Phal1_III.vtp
      WrapCylinder EDL_III_1: xyz_body_rotation=(0.210487 -0.141023 1.92876) translation=(0.004004 0.001911 -9.1e-5)
          quadrant=x radius=0.00091 length=0.00182
      WrapCylinder FDL_iii: xyz_body_rotation=(-0.0129154 -0.134565 -1.88024) translation=(0 -0.00364 0.000819)
          quadrant=x radius=0.002275 length=0.00455
      WrapCylinder TMP_1: xyz_body_rotation=(0.335278 0.0794125 1.3) translation=(-0.000273 0.00091 0.003094)
          quadrant=-x radius=0.006825 length=0.01274
    Body Phal1_IV: mass=0 mass_center=(0 0 0) inertia=(0 0 0 0 0 0) meshes=Phal1_IV.vtp
      WrapCylinder EDL_IV: xyz_body_rotation=(-0.066497 0.0923279 1.57952) translation=(0.009191 0.002002 -0.000455)
          quadrant=x radius=0.00182 length=0.001911
      WrapCylinder FDL_iv: xyz_body_rotation=(-0.551699 0.226893 -1.37916) translation=(0.001092 -0.002184 0.000546)
          quadrant=x radius=0.00182 length=0.00637
      WrapCylinder DF_iv_1: xyz_body_rotation=(3.07143 0.156207 2.02947) translation=(0.002275 0.003822 0.001092)
          quadrant=x radius=0.006825 length=0.00455
    Body hallux: mass=0 mass_center=(0 0 0) inertia=(0 0 0 0 0 0) meshes=hallux.vtp
    Body Phal2_IV: mass=0 mass_center=(0 0 0) inertia=(0 0 0 0 0 0) meshes=Phal2_IV.vtp
      WrapCylinder EDL_IV_1: xyz_body_rotation=(-0.00139626 0.137706 0.744907) translation=(0.007644 0.000819 0)
          quadrant=x radius=0.00182 length=0.001365
    Body Phal3_IV: mass=0 mass_center=(0 0 0) inertia=(0 0 0 0 0 0) meshes=Phal3_IV.vtp
      WrapCylinder FDL_iv_1: xyz_body_rotation=(-0.0481711 0.0837758 1.67936) translation=(0.003003 0.001001 0)
          quadrant=-x radius=0.00455 length=0.00455
    Body Phal2_II: mass=0 mass_center=(0 0 0) inertia=(0 0 0 0 0 0) meshes=Phal2_II.vtp
      WrapCylinder FDL_ii_1: xyz_body_rotation=(-0.268606 0.00383972 -2.0368) translation=(0.000819 -0.000546 0.000364)
          quadrant=x radius=0.00182 length=0.00182
    Body Phal2_III: mass=0.002442905 mass_center=(0.01575802 -0.02669203 0) inertia=(2.816785e-7 0 2.816785e-7 0 0 0)
        meshes=Phal2_III.vtp
      WrapCylinder EDL_III: xyz_body_rotation=(0.182736 -0.143466 1.24529) translation=(0.00273 0.002093 -0.002548)
          quadrant=x radius=0.00182 length=0.0091
      WrapCylinder IP_1: active=false xyz_body_rotation=(0.213105 -0.0244346 1.51913)
          translation=(0.000728 -0.002548 -0.002548) quadrant=-x radius=0.00091 length=0.00819
    Body patella: mass=0 mass_center=(0 0 0) inertia=(0 0 0 0 0 0) meshes=patella.vtp
      WrapSphere FTLD: xyz_body_rotation=(-0.0549779 0.156556 1.23622) translation=(-0.0001 -0.0021 0) quadrant=all
          radius=0.003
  JointSet:
    CustomJoint ground_pelvis: socket_parent_frame=/ground socket_child_frame=/bodyset/pelvis
      Coordinate pelvis_tilt: default_value=0.5544038 range=(-1.570796 1.570796) clamped=false
      Coordinate pelvis_list: default_value=-9.251755e-18 range=(-1.570796 1.570796) clamped=false
      Coordinate pelvis_rotation: default_value=-3.416696e-17 range=(-1.570796 1.570796) clamped=false
      Coordinate pelvis_tx: default_value=1.089576e-16 range=(-5 5) clamped=false
      Coordinate pelvis_ty: default_value=5.359593e-17 range=(-1 2) clamped=false
      Coordinate pelvis_tz: default_value=0 range=(-3 3) clamped=false
      SpatialTransform:
        TransformAxis rotation1: coordinates=pelvis_tilt axis=(0 0 1) LinearFunction(coefficients=1 0)
        TransformAxis rotation2: coordinates=pelvis_list axis=(1 0 0) LinearFunction(coefficients=1 0)
        TransformAxis rotation3: coordinates=pelvis_rotation axis=(0 1 0) LinearFunction(coefficients=1 0)
        TransformAxis translation1: coordinates=pelvis_tx axis=(1 0 0) LinearFunction(coefficients=1 0)
        TransformAxis translation2: coordinates=pelvis_ty axis=(0 1 0) LinearFunction(coefficients=1 0)
        TransformAxis translation3: coordinates=pelvis_tz axis=(0 0 1) LinearFunction(coefficients=1 0)
    CustomJoint hip: socket_parent_frame=pelvis_offset socket_child_frame=/bodyset/femur
      Coordinate hip_flexion: default_value=0.5235988 range=(-0.5235988 1.570796) clamped=true
      Coordinate hip_adduction: default_value=0.2094395 range=(-0.8726646 0.5235988) clamped=true
      Coordinate hip_rotation: default_value=0.08726646 range=(-0.3490659 0.3490659) clamped=true
      PhysicalOffsetFrame pelvis_offset: socket_parent=/bodyset/pelvis translation=(0.027 -0.0148 0.0225) [meters]
      SpatialTransform: axes_held_at_zero=(translation1 translation2 translation3)
        TransformAxis rotation1: coordinates=hip_flexion axis=(0 0 1) LinearFunction(coefficients=1 0)
        TransformAxis rotation2: coordinates=hip_adduction axis=(1 0 0) LinearFunction(coefficients=1 0)
        TransformAxis rotation3: coordinates=hip_rotation axis=(0 1 0) LinearFunction(coefficients=1 0)
    CustomJoint knee: socket_parent_frame=/bodyset/femur socket_child_frame=/bodyset/tibia
      Coordinate knee_flexion: default_value=-1.396263 range=(-2.530727 -0.2617994) clamped=true
      Coordinate knee_adduction: default_value=0.03490658 range=(-0.8726646 0.5235988) clamped=true
      Coordinate knee_rotation: default_value=-0.2617994 range=(-0.3490659 0.3490659) clamped=true
      SpatialTransform:
        TransformAxis rotation1: coordinates=knee_flexion axis=(0 0 1) LinearFunction(coefficients=1 0)
        TransformAxis rotation2: coordinates=knee_adduction axis=(1 0 0) LinearFunction(coefficients=1 0)
        TransformAxis rotation3: coordinates=knee_rotation axis=(0 1 0) LinearFunction(coefficients=1 0)
        TransformAxis translation1: coordinates=knee_flexion axis=(1 0 0)
          MultiplierFunction: scale=1.06
            SimmSpline: x=(-3.05433 -2.61799 -2.0944 -1.58377 -1.0472 -0.614607 -0.174533)
                y=(-0.0077 -0.007049 -0.006049 -0.0045 -0.0026 -0.001 0)
        TransformAxis translation2: coordinates=knee_flexion axis=(0 1 0)
          MultiplierFunction: scale=1.06
            SimmSpline: x=(-3.05433 -2.61799 -2.0944 -1.58377 -1.0472 -0.614607 -0.174533)
                y=(-0.07 -0.072 -0.073 -0.074 -0.074 -0.074 -0.074)
        TransformAxis translation3: coordinates=knee_flexion axis=(0 0 1)
          MultiplierFunction: scale=1.06 PiecewiseLinearFunction(x=-17453.3 17453.3, y=0.025 0.025)
    CustomJoint ankle: socket_parent_frame=/bodyset/tibia socket_child_frame=/bodyset/tmet
      Coordinate ankle_flexion: default_value=2.094395 range=(0 2.530727) clamped=true
      Coordinate ankle_adduction: default_value=-0.05235988 range=(-0.8726646 0.5235988) clamped=true
      Coordinate ankle_rotation: default_value=0 range=(-0.3490659 0.3490659) clamped=true
      SpatialTransform:
        TransformAxis rotation1: coordinates=ankle_flexion axis=(0 0 1) LinearFunction(coefficients=1 0)
        TransformAxis rotation2: coordinates=ankle_adduction axis=(1 0 0) LinearFunction(coefficients=1 0)
        TransformAxis rotation3: coordinates=ankle_rotation axis=(0 1 0) LinearFunction(coefficients=1 0)
        TransformAxis translation1: coordinates=ankle_flexion axis=(1 0 0)
          MultiplierFunction: scale=1.03
            SimmSpline: x=(-3.05433 -2.61799 -2.0944 -1.58377 -0.959931 -0.523599 -0.174533)
                y=(-0.0097 -0.054955 -0.043485 -0.0026 0.0016 0 0)
        TransformAxis translation2: coordinates=ankle_flexion axis=(0 1 0)
          MultiplierFunction: scale=1.03
            SimmSpline: x=(-3.05433 -2.61799 -2.0944 -1.58377 -0.959931 -0.523599 -0.174533)
                y=(-0.119 -0.08 -0.09 -0.119 -0.119 -0.119 -0.119)
        TransformAxis translation3: coordinates=ankle_flexion axis=(0 0 1)
          MultiplierFunction: scale=1.03 PiecewiseLinearFunction(x=-17453.3 17453.3, y=0.003 0.003)
    CustomJoint tmp_II: socket_parent_frame=tmet_offset socket_child_frame=/bodyset/Phal1_II
      Coordinate tmp_II_flexion: default_value=-1.745329 range=(-4.712389 1.570796) clamped=true
      Coordinate tmp_II_adduction: default_value=0.003106686 range=(-1.570796 0.5235988) clamped=true
      Coordinate tmp_II_rotation: default_value=0.1311615 range=(-0.3490659 0.5235988) clamped=true
      PhysicalOffsetFrame tmet_offset: socket_parent=/bodyset/tmet translation=(-0.004365 -0.066639 0.00194)
      SpatialTransform: axes_held_at_zero=(translation1 translation2 translation3)
        TransformAxis rotation1: coordinates=tmp_II_flexion axis=(0 0 1) LinearFunction(coefficients=1 0)
        TransformAxis rotation2: coordinates=tmp_II_adduction axis=(1 0 0) LinearFunction(coefficients=1 0)
        TransformAxis rotation3: coordinates=tmp_II_rotation axis=(0 1 0) LinearFunction(coefficients=1 0)
    CustomJoint tmp_III: socket_parent_frame=tmet_offset socket_child_frame=/bodyset/Phal1_III
      Coordinate tmp_III_flexion: default_value=-1.850049 range=(-4.712389 1.570796) clamped=true
      Coordinate tmp_III_adduction: default_value=-0.1621411 range=(-0.8726646 0.5235988) clamped=true
      Coordinate tmp_III_rotation: default_value=-0.09707521 range=(-0.3490659 0.3490659) clamped=true
      PhysicalOffsetFrame tmet_offset: socket_parent=/bodyset/tmet translation=(0.001746 -0.07178 0.00582)
      SpatialTransform: axes_held_at_zero=(translation1 translation2 translation3)
        TransformAxis rotation1: coordinates=tmp_III_flexion axis=(0 0 1) LinearFunction(coefficients=1 0)
        TransformAxis rotation2: coordinates=tmp_III_adduction axis=(1 0 0) LinearFunction(coefficients=1 0)
        TransformAxis rotation3: coordinates=tmp_III_rotation axis=(0 1 0) LinearFunction(coefficients=1 0)
    CustomJoint tmp_IV: socket_parent_frame=tmet_offset socket_child_frame=/bodyset/Phal1_IV
      Coordinate tmp_IV_flexion: default_value=-1.855826 range=(-4.712389 1.570796) clamped=true
      Coordinate tmp_IV_adduction: default_value=-5.561348e-11 range=(-0.8726646 0.5235988) clamped=true
      Coordinate tmp_IV_rotation: default_value=-0.1425236 range=(-0.3490659 0.3490659) clamped=true
      PhysicalOffsetFrame tmet_offset: socket_parent=/bodyset/tmet translation=(-0.003395 -0.06984 0.010185)
      SpatialTransform: axes_held_at_zero=(translation1 translation2 translation3)
        TransformAxis rotation1: coordinates=tmp_IV_flexion axis=(0 0 1) LinearFunction(coefficients=1 0)
        TransformAxis rotation2: coordinates=tmp_IV_adduction axis=(1 0 0) LinearFunction(coefficients=1 0)
        TransformAxis rotation3: coordinates=tmp_IV_rotation axis=(0 1 0) LinearFunction(coefficients=1 0)
    CustomJoint HAL: socket_parent_frame=tmet_offset socket_child_frame=/bodyset/hallux
      Coordinate HAL_flexion: default_value=-1.8486 range=(-5.235988 -1.745329) clamped=true
      Coordinate HAL_adduction: default_value=-0.1600816 range=(-0.8726646 3.141593) clamped=true
      Coordinate HAL_rotation: default_value=0.3211406 range=(-0.3490659 1.570796) clamped=true
      PhysicalOffsetFrame tmet_offset: socket_parent=/bodyset/tmet translation=(-0.006305 -0.0582 0.00291)
      SpatialTransform: axes_held_at_zero=(translation1 translation2 translation3)
        TransformAxis rotation1: coordinates=HAL_flexion axis=(0 0 1) LinearFunction(coefficients=1 0)
        TransformAxis rotation2: coordinates=HAL_adduction axis=(1 0 0) LinearFunction(coefficients=1 0)
        TransformAxis rotation3: coordinates=HAL_rotation axis=(0 1 0) LinearFunction(coefficients=1 0)
    CustomJoint IP1_IV: socket_parent_frame=Phal1_IV_offset socket_child_frame=/bodyset/Phal2_IV
      Coordinate IP1_IV_flexion: default_value=0 range=(-1.570796 1.570796) clamped=true
      Coordinate IP1_IV_adduction: default_value=-5.561348e-11 range=(-0.8726646 0.5235988) clamped=true
      Coordinate IP1_IV_rotation: default_value=0 range=(-0.3490659 0.3490659) clamped=true
      PhysicalOffsetFrame Phal1_IV_offset: socket_parent=/bodyset/Phal1_IV translation=(0.014924 0.000546 -0.00091)
      SpatialTransform: axes_held_at_zero=(translation1 translation2 translation3)
        TransformAxis rotation1: coordinates=IP1_IV_flexion axis=(0 0 1) LinearFunction(coefficients=1 0)
        TransformAxis rotation2: coordinates=IP1_IV_adduction axis=(1 0 0) LinearFunction(coefficients=1 0)
        TransformAxis rotation3: coordinates=IP1_IV_rotation axis=(0 1 0) LinearFunction(coefficients=1 0)
    CustomJoint IP2_IV: socket_parent_frame=Phal1_IV_offset socket_child_frame=/bodyset/Phal3_IV
      Coordinate IP2_IV_flexion: default_value=0 range=(-1.570796 1.570796) clamped=true
      Coordinate IP2_IV_adduction: default_value=-5.561348e-11 range=(-0.8726646 0.5235988) clamped=true
      Coordinate IP2_IV_rotation: default_value=0 range=(-0.3490659 0.3490659) clamped=true
      PhysicalOffsetFrame Phal1_IV_offset: socket_parent=/bodyset/Phal1_IV translation=(0.022295 0.001456 -0.000455)
      SpatialTransform: axes_held_at_zero=(translation1 translation2 translation3)
        TransformAxis rotation1: coordinates=IP2_IV_flexion axis=(0 0 1) LinearFunction(coefficients=1 0)
        TransformAxis rotation2: coordinates=IP2_IV_adduction axis=(1 0 0) LinearFunction(coefficients=1 0)
        TransformAxis rotation3: coordinates=IP2_IV_rotation axis=(0 1 0) LinearFunction(coefficients=1 0)
    CustomJoint IP1_II: socket_parent_frame=Phal1_II_offset socket_child_frame=/bodyset/Phal2_II
      Coordinate IP1_II_flexion: default_value=0 range=(-1.570796 1.570796) clamped=true
      Coordinate IP1_II_adduction: default_value=-5.561348e-11 range=(-0.8726646 0.5235988) clamped=true
      Coordinate IP1_II_rotation: default_value=-0.08881981 range=(-0.3490659 0.3490659) clamped=true
      PhysicalOffsetFrame Phal1_II_offset: socket_parent=/bodyset/Phal1_II translation=(0.018928 0 0.000273)
      SpatialTransform: axes_held_at_zero=(translation1 translation2 translation3)
        TransformAxis rotation1: coordinates=IP1_II_flexion axis=(0 0 1) LinearFunction(coefficients=1 0)
        TransformAxis rotation2: coordinates=IP1_II_adduction axis=(1 0 0) LinearFunction(coefficients=1 0)
        TransformAxis rotation3: coordinates=IP1_II_rotation axis=(0 1 0) LinearFunction(coefficients=1 0)
    CustomJoint IP1_III: socket_parent_frame=Phal1_III_offset socket_child_frame=/bodyset/Phal2_III
      Coordinate IP1_III_flexion: default_value=0 range=(-1.570796 1.570796) clamped=true
      Coordinate IP1_III_adduction: default_value=-5.561348e-11 range=(-0.8726646 0.5235988) clamped=true
      Coordinate IP1_III_rotation: default_value=0 range=(-0.3490659 0.3490659) clamped=true
      PhysicalOffsetFrame Phal1_III_offset: socket_parent=/bodyset/Phal1_III translation=(0.01729 0 0.000273)
      SpatialTransform: axes_held_at_zero=(translation1 translation2 translation3)
        TransformAxis rotation1: coordinates=IP1_III_flexion axis=(0 0 1) LinearFunction(coefficients=1 0)
        TransformAxis rotation2: coordinates=IP1_III_adduction axis=(1 0 0) LinearFunction(coefficients=1 0)
        TransformAxis rotation3: coordinates=IP1_III_rotation axis=(0 1 0) LinearFunction(coefficients=1 0)
    CustomJoint tipat: socket_parent_frame=/bodyset/tibia socket_child_frame=/bodyset/patella
      Coordinate tipat_tx: default_value=0.0002657368 range=(-99999.9 99999.9) clamped=false
      Coordinate tipat_ty: default_value=0.008731844 range=(-99999.9 99999.9) clamped=false
      Coordinate tipat_tz: default_value=0.0002024189 range=(-99999.9 99999.9) clamped=false
      SpatialTransform: axes_held_at_zero=(rotation1 rotation2 rotation3)
        TransformAxis translation1: coordinates=tipat_tx axis=(1 0 0) LinearFunction(coefficients=1 0)
        TransformAxis translation2: coordinates=tipat_ty axis=(0 1 0) LinearFunction(coefficients=1 0)
        TransformAxis translation3: coordinates=tipat_tz axis=(0 0 1) LinearFunction(coefficients=1 0)
  ConstraintSet:
    CoordinateCouplerConstraint tipat_tx_con: independent_coordinate_names=knee_flexion
        dependent_coordinate_name=tipat_tx scale_factor=1.03
      coupled_coordinates_function: SimmSpline: x=(-3.05433 -2.61799 -2.0944 -1.5708 -1.07169 -0.614607 0.0872665)
          y=(0.002 -0.001 0.0005 0.00023 0.001329 0.003054 0.009)
    CoordinateCouplerConstraint tipat_ty_con: independent_coordinate_names=knee_flexion
        dependent_coordinate_name=tipat_ty scale_factor=1.03
      coupled_coordinates_function: SimmSpline: x=(-3.05433 -2.61799 -2.0944 -1.5708 -1.07169 -0.614607 0.0872665)
          y=(0.0022 0.0069 0.0079 0.008887 0.0092 0.009034 0.009)
    CoordinateCouplerConstraint tipat_tz_con: independent_coordinate_names=knee_flexion
        dependent_coordinate_name=tipat_tz scale_factor=1.03
      coupled_coordinates_function: SimmSpline: x=(-3.05433 -2.67368 -2.03763 -1.58377 -1.07169 -0.614607 0.0872665)
          y=(0.000128 0.000252 0.000251 0.0002 -8e-6 -0.001 -0.000925)
    CoordinateCouplerConstraint tmp_flexion_23: independent_coordinate_names=tmp_III_flexion
        dependent_coordinate_name=tmp_II_flexion
      coupled_coordinates_function: SimmSpline: x=(-270 0 90) y=(-270 0 90)
    CoordinateCouplerConstraint tmp_flexion_34: independent_coordinate_names=tmp_III_flexion
        dependent_coordinate_name=tmp_IV_flexion
      coupled_coordinates_function: SimmSpline: x=(-270 0 90) y=(-270 0 90)
    CoordinateCouplerConstraint IP1_23: independent_coordinate_names=IP1_III_flexion
        dependent_coordinate_name=IP1_II_flexion
      coupled_coordinates_function: SimmSpline: x=(-270 0 90) y=(-270 0 90)
    CoordinateCouplerConstraint IP1_43: independent_coordinate_names=IP1_III_flexion
        dependent_coordinate_name=IP1_IV_flexion
      coupled_coordinates_function: SimmSpline: x=(-270 0 90) y=(-270 0 90)
  ForceSet:
    Schutte1993Muscle_Deprecated LG: max_isometric_force=78.22595 optimal_fiber_length=0.02840104
        tendon_slack_length=0.0791101 pennation_angle_at_optimal=0.3761152 [radians]
      PathPoint P1: femur (-0.0006996 -0.0713168 0.037312)
      PathPoint P2: tibia (-0.0031724 -0.0001648 0.0136784)
      PathPoint P3: tibia (0.0025441 -0.0302202 0.0091052)
      PathPoint P4: tibia (0.0011227 -0.0534776 0.0091876)
      PathPoint P5: tibia (-0.0017098 -0.0722854 0.0063757)
      PathPoint P6: tibia (-0.004944 -0.0975101 0.0061079)
      PathPoint P7: tibia (-0.0088992 -0.117008 0.0032342)
      PathPoint P8: tmet (-0.007178 -0.005529 -9.7e-5)
      PathWrap LG_pathwrap: wrap_object=pat_1 range=(1 3)
      PathWrap LG_pathwrap_0: wrap_object=tib_1 range=(1 3)
      PathWrap LG_pathwrap_1: wrap_object=ANKLE_4 range=(7 8)
      tendon_force_length_curve: SimmSpline: x=(-0.1 -0.002 -0.001 0 0.002 0.004 0.006 0.008 0.01 0.012 0.014 0.016 0.018 0.02 0.022 0.024 0.026 0.028 0.03 0.032 0.034 0.036 0.038 0.04 9.2 9.201 9.202 12)
          y=(0 0 0 0.0118045 0.0108563 0.0130303 0.0183047 0.0266581 0.0380687 0.052515 0.0699754 0.0904283 0.113852 0.140225 0.169526 0.201732 0.236823 0.274777 0.315572 0.359187 0.4056 0.454789 0.506733 0.56141 211.227 211.25 211.273 275.623)
      active_force_length_curve: SimmSpline: x=(0 0.401 0.402 0.4035 0.588983 0.658983 0.728983 0.798983 0.868983 0.938983 1.00898 1.07898 1.14898 1.21898 1.28898 1.35898 1.42898 1.49898 1.56898 1.61875 1.62 1.621 2)
          y=(0 0 0 0 0.019974 0.015459 0.011897 0.00922 0.007363 0.006259 0.005841 0.006044 0.006801 0.008046 0.009711 0.011731 0.01404 0.016571 0.019257 0 0 0 0)
    Schutte1993Muscle_Deprecated MG: max_isometric_force=66.74195 optimal_fiber_length=0.04664544
        tendon_slack_length=0.1164161 pennation_angle_at_optimal=0.06124677
      PathPoint P1: femur (-0.0028302 -0.0702992 0.0213378)
      PathPoint P2: tibia (-0.0077765 -0.0045629 -0.0069113)
      PathPoint P3: tibia (-0.0004841 -0.055826 -0.0012669)
      PathPoint P4: tibia (-0.0041715 -0.0997349 0.0017819)
      PathPoint P5: tibia (-0.008858 -0.117008 0.003193)
      PathPoint P6: tmet (-0.007178 -0.005529 0.0001261)
      PathWrap MG_pathwrap: wrap_object=ANKLE_4
      tendon_force_length_curve: SimmSpline: x=(-0.1 -0.002 -0.001 0 0.002 0.004 0.006 0.008 0.01 0.012 0.014 0.016 0.018 0.02 0.022 0.024 0.026 0.028 0.03 0.032 0.034 0.036 0.038 0.04 9.2 9.201 9.202 12)
          y=(0 0 0 0.0138354 0.0127241 0.015272 0.0214539 0.0312444 0.0446181 0.0615498 0.0820141 0.105986 0.133439 0.164349 0.198691 0.236438 0.277567 0.32205 0.369864 0.420982 0.47538 0.533031 0.593912 0.657995 247.566 247.593 247.62 323.041)
      active_force_length_curve: SimmSpline: x=(0 0.401 0.402 0.4035 0.588983 0.658983 0.728983 0.798983 0.868983 0.938983 1.00898 1.07898 1.14898 1.21898 1.28898 1.35898 1.42898 1.49898 1.56898 1.61875 1.62 1.621 2)
          y=(0 0 0 0 0.019974 0.015459 0.011897 0.00922 0.007363 0.006259 0.005841 0.006044 0.006801 0.008046 0.009711 0.011731 0.01404 0.016571 0.019257 0 0 0 0)
    Schutte1993Muscle_Deprecated IG: max_isometric_force=10.11723 optimal_fiber_length=0.07369936
        tendon_slack_length=0.07837623 pennation_angle_at_optimal=0.3718424
      PathPoint P1: femur (-0.0024804 -0.0693664 0.0284504)
      PathPoint P2: tibia (-0.0082812 -0.0042436 0.0024823)
      PathPoint P3: tibia (-0.0024205 -0.0515 0)
      PathPoint P4: tibia (-0.002884 -0.0808241 0.0019467)
      PathPoint P5: tibia (-0.0048307 -0.1008473 0.0031106)
      PathPoint P6: tibia (-0.008858 -0.117008 0.003193)
      PathPoint P7: tmet (-0.0071489 -0.0055096 8.73e-5)
      PathWrap IG_pathwrap: wrap_object=ANKLE_4
      tendon_force_length_curve: SimmSpline: x=(-0.1 -0.002 -0.001 0 0.007422 0.015781 0.027109 0.038516 0.049531 0.061875 0.080703 0.092266 0.103516 9.2 9.201 9.202 12)
          y=(0 0 0 0 0.023345 0.051731 0.102799 0.173034 0.256267 0.387253 0.628333 0.791219 0.92499 115.406 115.406 115.406 115.406)
      active_force_length_curve: SimmSpline: x=(0 0.401 0.402 0.4035 0.588983 0.658983 0.728983 0.798983 0.868983 0.938983 1.00898 1.07898 1.14898 1.21898 1.28898 1.35898 1.42898 1.49898 1.56898 1.61875 1.62 1.621 2)
          y=(0 0 0 0 0.019974 0.015459 0.011897 0.00922 0.007363 0.006259 0.005841 0.006044 0.006801 0.008046 0.009711 0.011731 0.01404 0.016571 0.019257 0 0 0 0)
    ObjectGroup knee_flexion
    ObjectGroup hip_flexion
    ObjectGroup hip_adduction
    ObjectGroup hip_rotation
    ObjectGroup knee_adduction: members=(IG LG MG)
    ObjectGroup ankle_flexion: members=(IG LG MG)
    ObjectGroup ankle_adduction: members=(IG LG MG)
    ObjectGroup ankle_rotation: members=(IG LG MG)
    ObjectGroup knee_rotation: members=(IG MG)
    ObjectGroup tmp_III_flexion
    ObjectGroup tmp_III_adduction
    ObjectGroup tmp_III_rotation
    ObjectGroup tmp_II_flexion
    ObjectGroup tmp_II_adduction
    ObjectGroup tmp_II_rotation
    ObjectGroup IP1_III_flexion
    ObjectGroup IP1_III_adduction
    ObjectGroup IP1_III_rotation
    ObjectGroup HAL_flexion
    ObjectGroup HAL_adduction
    ObjectGroup HAL_rotation
    ObjectGroup IP1_II_flexion
    ObjectGroup IP1_II_adduction
    ObjectGroup IP1_II_rotation
    ObjectGroup tmp_IV_flexion
    ObjectGroup tmp_IV_adduction
    ObjectGroup tmp_IV_rotation
    ObjectGroup IP2_IV_flexion
    ObjectGroup IP2_IV_adduction
    ObjectGroup IP2_IV_rotation
  MarkerSet:
    Marker PM1: ground (0.0101296 0.00463692 0.00966831)
    Marker PM2: ground (0.0313699 0.0055774 0.00951629)
    Marker PS3: ground (0.00928197 0.00249633 0.0244053)
    Marker Ankle: tibia (-0.002032695 -0.1185427 0.01388316)
    Marker TMP: tmet (0.003035964 -0.06234122 0.01626865)
    Marker FemerMid: femur (-0.08411725 -0.07200453 0.03872636)
    Marker TMid: tmet (-0.0008246571 -0.03339041 0.008815554)
    Marker ToeProx: Phal1_III (0.0188056 0.004507676 -0.002092181)
    Marker ToeDist: Phal1_III (0.0513917 0.001956928 -0.003651466)
    Marker Hip: femur (-0.02358447 0.02256083 -0.02385)
